# Файл описывает процедуру прорисовки прямой от точки на графике к точке за границами видимой области
# Вспомогательные функции:
# Перевод в начало координат:
Offset_x(x, x_axis_min) := x - x_axis_min
Offset_y(y, y_axis_min) := y - y_axis_min
# Перевод в пиксели:
Pixel_x(x, width, x_axis_min, x_axis_max) := Offset_x(x, x_axis_min)*width/(x_axis_max - x_axis_min)
Pixel_y(y, height, y_axis_min, y_axis_max) := Offset_y(y, y_axis_min)*height/(y_axis_max - y_axis_min)
# Подсчет коэффициентов подобных треугольников:
K_x(vx, hx, width, x_axis_min, x_axis_max) :=
    return Pixel_x(hx, width, x_axis_min, x_axis_max)/(Pixel_x(vx, width, x_axis_min, x_axis_max) - Pixel_x(hx, width, x_axis_min, x_axis_max)) if Pixel_x(hx, width, x_axis_min, x_axis_max) < 0
    return (Pixel_x(hx, width, x_axis_min, x_axis_max) - width)/(Pixel_x(vx, width, x_axis_min, x_axis_max) - Pixel_x(hx, width, x_axis_min, x_axis_max)) if Pixel_x(hx, width, x_axis_min, x_axis_max) > width
    return 0
K_y(ivy, ihy, height, y_axis_min, y_axis_max) :=
    return ihy/(ivy - ihy) if ihy < 0
    return (ihy - height)/(ivy - ihy) if ihy > height
    return 0
# Подсчет координат новой крайней точки:
New_x_Hor(vx, vy, hx, hy, width, height, x_axis_min, x_axis_max, y_axis_min, y_axis_max) := Pixel_x(hx, width, x_axis_min, x_axis_max) + (Pixel_x(hx, width, x_axis_min, x_axis_max) - Pixel_x(vx, width, x_axis_min, x_axis_max))*K_x(vx, hx, width, x_axis_min, x_axis_max)
New_y_Hor(vx, vy, hx, hy, width, height, x_axis_min, x_axis_max, y_axis_min, y_axis_max) := Pixel_y(hy, height, y_axis_min, y_axis_max) + (Pixel_y(hy, height, y_axis_min, y_axis_max) - Pixel_y(vy, height, y_axis_min, y_axis_max))*K_x(vx, hx, width, x_axis_min, x_axis_max)
New_x_Ver(ivx, ivy, ihx, ihy, width, height, x_axis_min, x_axis_max, y_axis_min, y_axis_max) := ihx + (ihx - ivx)*K_y(ivy, ihy, height, y_axis_min, y_axis_max)
New_y_Ver(ivx, ivy, ihx, ihy, width, height, x_axis_min, x_axis_max, y_axis_min, y_axis_max) := ihy + (ihy - ivy)*K_y(ivy, ihy, height, y_axis_min, y_axis_max)
# Границы видимой области в реальных координатах:
X_AxisMin := 0
X_AxisMax := 200
Y_AxisMin := 0
Y_AxisMax := 100
# Размеры графика в пикселах:
Width := 200
Height := 100
# Координаты видимой точки:
vx := 50
vy := 50
# Координаты невидимой точки:
hx := 50
hy := 150
# Результаты
Offset_x(vx, X_AxisMin) = 50
Offset_y(vy, Y_AxisMin) = 50
Offset_x(hx, X_AxisMin) = 50
Offset_y(hy, Y_AxisMin) = 150
ivx := Pixel_x(vx, Width, X_AxisMin, X_AxisMax)
ivx = 50
ivy := Pixel_y(vy, Height, Y_AxisMin, Y_AxisMax)
ivy = 50
ihx := Pixel_x(hx, Width, X_AxisMin, X_AxisMax)
ihx = 50
ihy := Pixel_y(hy, Height, Y_AxisMin, Y_AxisMax)
ihy = 150
K_x(vx, hx, Width, X_AxisMin, X_AxisMax) = 0
new_x_hor := New_x_Hor(vx, vy, hx, hy, Width, Height, X_AxisMin, X_AxisMax, Y_AxisMin, Y_AxisMax)
new_x_hor = 50
new_y_hor := New_y_Hor(vx, vy, hx, hy, Width, Height, X_AxisMin, X_AxisMax, Y_AxisMin, Y_AxisMax)
new_y_hor = 150
K_y(vy, new_y_hor, Height, Y_AxisMin, Y_AxisMax) = -0.5
new_x := New_x_Ver(ivx, ivy, new_x_hor, new_y_hor, Width, Height, X_AxisMin, X_AxisMax, Y_AxisMin, Y_AxisMax)
new_x = 50
new_y := New_y_Ver(ivx, ivy, new_x_hor, new_y_hor, Width, Height, X_AxisMin, X_AxisMax, Y_AxisMin, Y_AxisMax)
new_y = 100
ihx - ivx = 0
Width - ivx = 150
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